*Heading
** Job name: WarmForging Model name: WarmForging
** Generated by: Abaqus/CAE 2017
*Preprint, echo=NO, model=NO, history=NO, contact=NO
**
** PARTS
**
*Part, name=Billet
*Node
      1,           0.,          22.
      2,           0.,    20.706459
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*Element, type=CAX4RT
   1,    1,    2,  150,  149
   2,    2,    3,  151,  150
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*Nset, nset=Symmetry_Axis, generate
   1,  148,    1
*Elset, elset=Symmetry_Axis, generate
   1,  147,    1
*Nset, nset=Body, generate
    1,  2960,     1
*Elset, elset=Body, generate
    1,  2793,     1
*Nset, nset=Bottom_Surface, generate
  148,  2960,   148
*Elset, elset=Bottom_Surface, generate
  147,  2793,   147
*Nset, nset=Top_Surface, generate
    1,  2813,   148
*Elset, elset=Top_Surface, generate
    1,  2647,   147
*Elset, elset=_Surrounding_Surfaces_S2, internal, generate
  147,  2793,   147
*Elset, elset=_Surrounding_Surfaces_S3, internal, generate
 2647,  2793,     1
*Elset, elset=_Surrounding_Surfaces_S4, internal, generate
    1,  2647,   147
*Surface, type=ELEMENT, name=Surrounding_Surfaces
_Surrounding_Surfaces_S2, S2
_Surrounding_Surfaces_S3, S3
_Surrounding_Surfaces_S4, S4
*Elset, elset=_Tools_Contact_Surface_S2, internal, generate
  147,  2793,   147
*Elset, elset=_Tools_Contact_Surface_S3, internal, generate
 2647,  2793,     1
*Elset, elset=_Tools_Contact_Surface_S4, internal, generate
    1,  2647,   147
*Surface, type=ELEMENT, name=Tools_Contact_Surface
_Tools_Contact_Surface_S2, S2
_Tools_Contact_Surface_S3, S3
_Tools_Contact_Surface_S4, S4
** Section: Billet
*Solid Section, elset=Body, controls=EC-1, material=MildSteel_20MnCr5_1
,
*End Part
**
*Part, name=Die1
*Node
      1,           0.,        -190.
      2,           0.,        -200.
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*Element, type=CAX3T
 1, 286, 159, 213
 2, 218, 215, 158
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*Element, type=CAX4RT
 13, 210, 209, 262, 433
 14,  64, 412, 416, 423
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*Nset, nset=Symmetry_Axis
  1,  2,  3, 92
*Elset, elset=Symmetry_Axis
  20,  21, 168
*Nset, nset=Machine_Contact_Surfaces
   2,   4,   5,   6,   7,   8
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*Elset, elset=Machine_Contact_Surfaces
  15,  16,  20,  22,  23,  24
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*Nset, nset=Body, generate
   1,  469,    1
*Elset, elset=Body, generate
   1,  413,    1
*Elset, elset=_Billet_Contact_Surfaces_S2, internal
  44,  49,  70,  74,  84,  98, 101, 169, 170, 181
*Elset, elset=_Billet_Contact_Surfaces_S4, internal
  56,  80,  89, 105, 110, 123
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*Elset, elset=_Billet_Contact_Surfaces_S3, internal
  19,  26,  31,  32,  36,  54
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*Elset, elset=_Billet_Contact_Surfaces_S1, internal
  17,  35,  39,  50,  53,  60
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*Surface, type=ELEMENT, name=Billet_Contact_Surfaces
_Billet_Contact_Surfaces_S2, S2
_Billet_Contact_Surfaces_S4, S4
_Billet_Contact_Surfaces_S3, S3
_Billet_Contact_Surfaces_S1, S1
** Region: (Die:Body), (Controls:Default)
*Elset, elset=_I1, internal, generate
  1,  12,   1
** Section: Die
*Solid Section, elset=_I1, material=ToolSteel
,
** Region: (Die:Body), (Controls:EC-1)
*Elset, elset=_I2, internal, generate
  13,  413,    1
** Section: Die
*Solid Section, elset=_I2, controls=EC-1, material=ToolSteel
,
*End Part
**
*Part, name=Die2
*Node
      1,           0.,  -97.8783264
      2,          58.,  -97.8783264
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*Element, type=CAX3T
 1, 522, 117,  22
 2, 234,  23,  24
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*Element, type=CAX4RT
 16, 173, 219, 213, 174
 17,  94,  19, 145, 121
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*Nset, nset=Body, generate
   1,  576,    1
*Elset, elset=Body, generate
   1,  525,    1
*Nset, nset=Symmetry_Axis
   1,  28, 111, 112, 113, 114, 115
*Elset, elset=Symmetry_Axis
 101, 103, 355, 398, 400, 401
*Nset, nset=Machine_Contact_Surfaces
  1,  2,  3,  4, 29, 30
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*Elset, elset=Machine_Contact_Surfaces
  45,  46,  47,  71,  72,  73
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*Elset, elset=_Billet_Contact_Surfaces_S1, internal
  17,  20,  36,  40,  47,  60
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*Elset, elset=_Billet_Contact_Surfaces_S2, internal
   2,  22,  23,  71,  75,  78,  83,  84,  85, 107, 112, 116, 119, 231, 315, 519
*Elset, elset=_Billet_Contact_Surfaces_S4, internal
  21,  28,  30,  31,  38,  50
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*Elset, elset=_Billet_Contact_Surfaces_S3, internal
   6,  19,  86,  87,  89,  91,  97,  98,  99, 100, 113, 132, 174, 181
*Surface, type=ELEMENT, name=Billet_Contact_Surfaces
_Billet_Contact_Surfaces_S1, S1
_Billet_Contact_Surfaces_S2, S2
_Billet_Contact_Surfaces_S4, S4
_Billet_Contact_Surfaces_S3, S3
** Region: (Die:Body), (Controls:Default)
*Elset, elset=_I1, internal, generate
  1,  15,   1
** Section: Die
*Solid Section, elset=_I1, material=ToolSteel
,
** Region: (Die:Body), (Controls:EC-1)
*Elset, elset=_I2, internal, generate
  16,  525,    1
** Section: Die
*Solid Section, elset=_I2, controls=EC-1, material=ToolSteel
,
*End Part
**
*Part, name=Punch1
*Node
      1,           0.,           4.
      2,           0.,         0.25
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*Element, type=CAX4RT
 1,  1,  2, 11, 10
 2,  2,  3, 12, 11
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*Nset, nset=Symmetry_Axis, generate
 1,  9,  1
*Elset, elset=Symmetry_Axis, generate
 1,  8,  1
*Nset, nset=Machine_Contact_Surface, generate
  1,  64,   9
*Elset, elset=Machine_Contact_Surface, generate
  1,  49,   8
*Nset, nset=Body, generate
  1,  72,   1
*Elset, elset=Body, generate
  1,  56,   1
*Elset, elset=_Billet_Contact_Surface_S2, internal, generate
  8,  56,   8
*Surface, type=ELEMENT, name=Billet_Contact_Surface
_Billet_Contact_Surface_S2, S2
** Section: Punch
*Solid Section, elset=Body, controls=EC-1, material=ToolSteel
,
*End Part
**
*Part, name=Punch2
*Node
      1,           0.,   3.96727371
      2,   25.8500004,   3.96727371
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*Element, type=CAX3T
1, 165, 149, 148
2, 174, 124, 128
3,  81, 106,  77
*Element, type=CAX4RT
  4,  50,  49,  83, 110
  5, 148, 149, 167, 140
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*Nset, nset=Body, generate
   1,  176,    1
*Elset, elset=Body, generate
   1,  150,    1
*Nset, nset=Symmetry_Axis
  1,  9, 49, 50, 51, 52, 53
*Elset, elset=Symmetry_Axis
   4,  34,  43,  47,  96, 123
*Nset, nset=Machine_Contact_Surface
  8,  9, 40, 41, 42, 43, 44, 45, 46, 47, 48
*Elset, elset=Machine_Contact_Surface
  24,  25,  34, 104, 124, 125, 128, 131, 138, 140
*Elset, elset=_Billet_Contact_Surfaces_S4, internal
 10, 11, 14, 15, 16, 17, 32, 40, 63
*Elset, elset=_Billet_Contact_Surfaces_S2, internal
  7, 12, 13, 19, 43, 44, 49, 50, 58, 68, 69
*Elset, elset=_Billet_Contact_Surfaces_S3, internal
  23, 149
*Elset, elset=_Billet_Contact_Surfaces_S1, internal
   8, 148
*Surface, type=ELEMENT, name=Billet_Contact_Surfaces
_Billet_Contact_Surfaces_S4, S4
_Billet_Contact_Surfaces_S2, S2
_Billet_Contact_Surfaces_S3, S3
_Billet_Contact_Surfaces_S1, S1
** Region: (Punch:Body), (Controls:Default)
*Elset, elset=_I1, internal, generate
 1,  3,  1
** Section: Punch
*Solid Section, elset=_I1, material=ToolSteel
,
** Region: (Punch:Body), (Controls:EC-1)
*Elset, elset=_I2, internal, generate
   4,  150,    1
** Section: Punch
*Solid Section, elset=_I2, controls=EC-1, material=ToolSteel
,
*End Part
**
**
** ASSEMBLY
**
*Assembly, name=Assembly
**
*Instance, name=Die1-1, part=Die1
          0.,        -155.,           0.
*End Instance
**
*Instance, name=Billet-1, part=Billet
 1.77635683940025e-15,         -42.,           0.
*End Instance
**
*Instance, name=Punch1-1, part=Punch1
          0.,          6.5,           0.
*End Instance
**
*Instance, name=Punch2-1, part=Punch2
          0., -111.967273712158,           0.
*End Instance
**
*Instance, name=Die2-1, part=Die2
          0., -294.928183080021,           0.
*End Instance
**
*Node
      1,           0.,         10.5,           0.
*Node
      2,          58.,        -355.,           0.
*Node
      3,           0.,        -84.5,           0.
*Node
      4,          58.,  -392.806519,           0.
*Nset, nset=Tools1, instance=Die1-1, generate
   1,  469,    1
*Nset, nset=Tools1, instance=Punch1-1, generate
  1,  72,   1
*Elset, elset=Tools1, instance=Die1-1, generate
   1,  413,    1
*Elset, elset=Tools1, instance=Punch1-1, generate
  1,  56,   1
*Nset, nset=Tools2, instance=Punch2-1, generate
   1,  176,    1
*Nset, nset=Tools2, instance=Die2-1, generate
   1,  576,    1
*Elset, elset=Tools2, instance=Punch2-1, generate
   1,  150,    1
*Elset, elset=Tools2, instance=Die2-1, generate
   1,  525,    1
*Nset, nset=_PickedSet51, internal
 1,
*Nset, nset=_PickedSet58, internal
 1,
*Nset, nset=_PickedSet62, internal, instance=Billet-1, generate
    1,  2960,     1
*Elset, elset=_PickedSet62, internal, instance=Billet-1, generate
    1,  2793,     1
*Nset, nset=_PickedSet63, internal, instance=Billet-1, generate
    1,  2960,     1
*Elset, elset=_PickedSet63, internal, instance=Billet-1, generate
    1,  2793,     1
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*Nset, nset=_PickedSet152, internal
 2,
*Nset, nset=_PickedSet157, internal, instance=Billet-1, generate
    1,  2960,     1
*Elset, elset=_PickedSet157, internal, instance=Billet-1, generate
    1,  2793,     1
*Nset, nset=_PickedSet208, internal
 1,
*Nset, nset=_PickedSet209, internal
 2,
*Nset, nset=_PickedSet220, internal
 3,
*Nset, nset=_PickedSet221, internal
 4,
*Nset, nset=_PickedSet233, internal
 3,
*Nset, nset=_PickedSet234, internal
 4,
*Nset, nset=_PickedSet235, internal
 2,
*Nset, nset=_PickedSet238, internal
 3,
*Nset, nset=_PickedSet239, internal
 4,
** Constraint: Die1_Rigidity
*Rigid Body, ref node=_PickedSet152, elset=Die1-1.Body
** Constraint: Die2_Rigidity
*Rigid Body, ref node=_PickedSet221, elset=Die2-1.Body
** Constraint: Punch1_Rigidity
*Rigid Body, ref node=_PickedSet51, elset=Punch1-1.Body
** Constraint: Punch2_Rigidity
*Rigid Body, ref node=_PickedSet220, elset=Punch2-1.Body
*End Assembly
**
** ELEMENT CONTROLS
**
*Section Controls, name=EC-1, second order accuracy=YES
1., 1., 1.
*Amplitude, name=Punch1_Speed
             0.,              0.,             0.1,             40.,            2.37,             40.,            2.47,              0.
*Amplitude, name=Punch2_Speed
             0.,              0.,             0.1,             40.,            1.89,             40.,            1.99,              0.
*Amplitude, name=Tools_RemovalSpeed
             0.,              0.,            0.25,           2000.,             0.5,              0.
**
** MATERIALS
**
*Material, name=MildSteel_20MnCr5_1
*Conductivity
 42.7493, 20.
 42.8068, 30.
 42.9128, 40.
 43.0066, 50.
 43.0883, 60.
 43.1578, 70.
 43.2152, 80.
 43.2606, 90.
 43.2939,100.
 43.3153,110.
 43.3247,120.
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  34.617,600.
*Density
 7.81964e-09, 20.
 7.81817e-09, 30.
  7.8152e-09, 40.
 7.81222e-09, 50.
 7.80923e-09, 60.
 7.80622e-09, 70.
  7.8032e-09, 80.
 7.80017e-09, 90.
 7.79712e-09,100.
 7.79405e-09,110.
 7.79097e-09,120.
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 7.62689e-09,600.
*Depvar
      5,
*Expansion, zero=20.
 1.25868e-05, 30.
 1.26229e-05, 40.
 1.26589e-05, 50.
 1.26949e-05, 60.
  1.2731e-05, 70.
  1.2767e-05, 80.
 1.28031e-05, 90.
 1.28391e-05,100.
 1.28752e-05,110.
 1.29113e-05,120.
 1.29473e-05,130.
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 1.46506e-05,600.
*Inelastic Heat Fraction
          1.,
*Specific Heat
 4.4758e+08, 20.
 4.4982e+08, 30.
  4.542e+08, 40.
 4.5846e+08, 50.
 4.6263e+08, 60.
 4.6672e+08, 70.
 4.7075e+08, 80.
 4.7474e+08, 90.
  4.787e+08,100.
 4.8264e+08,110.
 4.8657e+08,120.
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 8.1387e+08,600.
*User Material, constants=1
1.,
*Material, name=ToolSteel
*Conductivity
 46.6,
*Density
 7.81e-09,
*Elastic
210000., 0.3
*Specific Heat
 4.75e+08,
**
** INTERACTION PROPERTIES
**
*Surface Interaction, name=Tools_Billet_Contact
*Friction, taumax=10.
 0.05,
*Gap Conductance
2.,0.
0.,2.
*Gap Conductance, pressure
 0.,   0.
15.,  50.
40.,1000.
*Gap Heat Generation
1., 0.5
*Surface Interaction, name=Tools_Billet_Frictionless_Contact
*Friction
0.,
*Gap Conductance
2.,0.
0.,2.
*Gap Conductance, pressure
 0.,   0.
15.,  50.
40.,1000.
**
** PHYSICAL CONSTANTS
**
*Physical Constants, absolute zero=-273.15, stefan boltzmann=5.67e-11, universal gas=8314.47
**
** PREDEFINED FIELDS
**
** Name: Billet_InitialTemperature   Type: Temperature
*Initial Conditions, type=TEMPERATURE
Billet-1.Body, 180.
** Name: Tools1_InitialTemperature   Type: Temperature
*Initial Conditions, type=TEMPERATURE
Tools1, 120.
** Name: Tools2_InitialTemperature   Type: Temperature
*Initial Conditions, type=TEMPERATURE
Tools2, 120.
** ----------------------------------------------------------------
**
** STEP: PreformForging
**
*Step, name=PreformForging, nlgeom=YES
*Dynamic Temperature-displacement, Explicit
, 2.47
*Bulk Viscosity
0.06, 1.2
** Mass Scaling: Semi-Automatic
**               Whole Model
*Fixed Mass Scaling, factor=10000.
**
** BOUNDARY CONDITIONS
**
** Name: Billet_SymmetryAxis Type: Symmetry/Antisymmetry/Encastre
*Boundary
Billet-1.Symmetry_Axis, XSYMM
** Name: Die1_DisplacementConstraint Type: Symmetry/Antisymmetry/Encastre
*Boundary
_PickedSet235, ENCASTRE
** Name: Die1_Machine_ContactTemperature Type: Temperature
*Boundary
Die1-1.Machine_Contact_Surfaces, 11, 11, 70.
** Name: Die1_SymmetryAxis Type: Symmetry/Antisymmetry/Encastre
*Boundary
Die1-1.Symmetry_Axis, XSYMM
** Name: Punch1_Machine_ContactTemperature Type: Temperature
*Boundary
Punch1-1.Machine_Contact_Surface, 11, 11, 70.
** Name: Punch1_SymmetryAxis Type: Symmetry/Antisymmetry/Encastre
*Boundary
Punch1-1.Symmetry_Axis, XSYMM
** Name: Punch1_Velocity Type: Velocity/Angular velocity
*Boundary, amplitude=Punch1_Speed, type=VELOCITY
_PickedSet58, 1, 1
_PickedSet58, 2, 2, -1.
_PickedSet58, 6, 6
*Adaptive Mesh Controls, name=Ada-1, geometric enhancement=YES
1., 0., 0.
*Adaptive Mesh, elset=Billet-1.Body, controls=Ada-1, frequency=5, mesh sweeps=3, op=NEW
**
** INTERACTIONS
**
** Interaction: Die1_Billet_Contact
*Contact Pair, interaction=Tools_Billet_Contact, mechanical constraint=KINEMATIC, cpset=Die1_Billet_Contact
Die1-1.Billet_Contact_Surfaces, Billet-1.Tools_Contact_Surface
** Interaction: Punch1_Billet_Contact
*Contact Pair, interaction=Tools_Billet_Contact, mechanical constraint=KINEMATIC, cpset=Punch1_Billet_Contact
Punch1-1.Billet_Contact_Surface, Billet-1.Tools_Contact_Surface
**
** OUTPUT REQUESTS
**
*Restart, write, overlay, number interval=1, time marks=NO
**
** FIELD OUTPUT: F-Output-1
**
*Output, field, number interval=500
*Node Output
CF, NT, RF, RFL, U, V
*Element Output, directions=YES
E, ER, HFL, LE, MISES, S, SDV, TEMP
*Contact Output
CFORCE, CSTRESS
**
** FIELD OUTPUT: F-Output-2
**
*Output, field, filter=ANTIALIASING, number interval=500
*Node Output
CF, NT, RF, RFL, U, V
*Element Output, directions=YES
E, ER, HFL, LE, MISES, S, SDV, TEMP
*Contact Output
CFORCE, CSTRESS
**
** HISTORY OUTPUT: H-Output-1
**
*Output, history, time interval=0.00494
*Energy Output
ALLAE, ALLCD, ALLCW, ALLDMD, ALLFD, ALLHF, ALLIE, ALLIHE, ALLKE, ALLMW, ALLPD, ALLPW, ALLSE, ALLVD, ALLWK, ETOTAL
**
** HISTORY OUTPUT: H-Output-2
**
*Output, history, filter=ANTIALIASING, time interval=0.00494
*Contact Output, cpset=Punch1_Billet_Contact
CFN1, CFN2, CFN3, CFNM, CFS1, CFS2, CFS3, CFSM, CFT1, CFT2, CFT3, CFTM
*End Step
** ----------------------------------------------------------------
**
** STEP: Interpause
**
*Step, name=Interpause, nlgeom=YES
*Dynamic Temperature-displacement, Explicit
, 2.5
*Bulk Viscosity
0.06, 1.2
** Mass Scaling: Semi-Automatic
**               Whole Model
*Fixed Mass Scaling, factor=10000.
**
** BOUNDARY CONDITIONS
**
** Name: Billet1_DisplacementConstraint Type: Displacement/Rotation
*Boundary, op=NEW
Billet-1.Top_Surface, 2, 2
** Name: Billet_SymmetryAxis Type: Symmetry/Antisymmetry/Encastre
*Boundary, op=NEW
Billet-1.Symmetry_Axis, XSYMM
** Name: Die1_DisplacementConstraint Type: Symmetry/Antisymmetry/Encastre
*Boundary, op=NEW
** Name: Die1_Machine_ContactTemperature Type: Temperature
*Boundary, op=NEW
Die1-1.Machine_Contact_Surfaces, 11, 11, 70.
** Name: Die1_RemovalVelocity Type: Velocity/Angular velocity
*Boundary, op=NEW, amplitude=Tools_RemovalSpeed, type=VELOCITY
_PickedSet209, 1, 1
_PickedSet209, 2, 2, -1.
_PickedSet209, 6, 6
** Name: Die1_SymmetryAxis Type: Symmetry/Antisymmetry/Encastre
*Boundary, op=NEW
Die1-1.Symmetry_Axis, XSYMM
** Name: Punch1_Machine_ContactTemperature Type: Temperature
*Boundary, op=NEW
Punch1-1.Machine_Contact_Surface, 11, 11, 70.
** Name: Punch1_RemovalVelocity Type: Velocity/Angular velocity
*Boundary, op=NEW, amplitude=Tools_RemovalSpeed, type=VELOCITY
_PickedSet208, 1, 1
_PickedSet208, 2, 2, 1.
_PickedSet208, 6, 6
** Name: Punch1_SymmetryAxis Type: Symmetry/Antisymmetry/Encastre
*Boundary, op=NEW
Punch1-1.Symmetry_Axis, XSYMM
** Name: Punch1_Velocity Type: Velocity/Angular velocity
*Boundary, op=NEW
*Adaptive Mesh, elset=Billet-1.Body, op=NEW
**
** INTERACTIONS
**
** Interaction: Die1_Billet_Contact
*Contact Pair, op=DELETE, cpset=Die1_Billet_Contact
Die1-1.Billet_Contact_Surfaces, Billet-1.Tools_Contact_Surface
*Contact Pair, interaction=Tools_Billet_Frictionless_Contact, mechanical constraint=KINEMATIC, cpset=Die1_Billet_Contact
Die1-1.Billet_Contact_Surfaces, Billet-1.Tools_Contact_Surface
** Interaction: Punch1_Billet_Contact
*Contact Pair, op=DELETE, cpset=Punch1_Billet_Contact
Punch1-1.Billet_Contact_Surface, Billet-1.Tools_Contact_Surface
*Contact Pair, interaction=Tools_Billet_Frictionless_Contact, mechanical constraint=KINEMATIC, cpset=Punch1_Billet_Contact
Punch1-1.Billet_Contact_Surface, Billet-1.Tools_Contact_Surface
** Interaction: Interpause_Convection
*Sfilm
Billet-1.Surrounding_Surfaces, F, 20., 0.015
** Interaction: Interpause_Radiation
*Sradiate
Billet-1.Surrounding_Surfaces, R, 20., 0.8
**
** OUTPUT REQUESTS
**
*Restart, write, overlay, number interval=1, time marks=NO
**
** FIELD OUTPUT: F-Output-1
**
*Output, field, number interval=500
*Node Output
CF, NT, RF, RFL, U, V
*Element Output, directions=YES
E, ER, HFL, LE, MISES, S, SDV, TEMP
*Contact Output
CFORCE, CSTRESS
**
** FIELD OUTPUT: F-Output-2
**
*Output, field, filter=ANTIALIASING, number interval=500
*Node Output
CF, NT, RF, RFL, U, V
*Element Output, directions=YES
E, ER, HFL, LE, MISES, S, SDV, TEMP
*Contact Output
CFORCE, CSTRESS
**
** HISTORY OUTPUT: H-Output-1
**
*Output, history, time interval=0.005
*Energy Output
ALLAE, ALLCD, ALLCW, ALLDMD, ALLFD, ALLHF, ALLIE, ALLIHE, ALLKE, ALLMW, ALLPD, ALLPW, ALLSE, ALLVD, ALLWK, ETOTAL
*End Step
** ----------------------------------------------------------------
**
** STEP: FinalForging
**
*Step, name=FinalForging, nlgeom=YES
*Dynamic Temperature-displacement, Explicit
, 2.
*Bulk Viscosity
0.06, 1.2
** Mass Scaling: Semi-Automatic
**               Whole Model
*Fixed Mass Scaling, factor=10000.
**
** BOUNDARY CONDITIONS
**
** Name: Billet1_DisplacementConstraint Type: Displacement/Rotation
*Boundary, op=NEW
** Name: Billet_SymmetryAxis Type: Symmetry/Antisymmetry/Encastre
*Boundary, op=NEW
Billet-1.Symmetry_Axis, XSYMM
** Name: Die1_Machine_ContactTemperature Type: Temperature
*Boundary, op=NEW
Die1-1.Machine_Contact_Surfaces, 11, 11, 70.
** Name: Die1_RemovalVelocity Type: Velocity/Angular velocity
*Boundary, op=NEW
** Name: Die1_SymmetryAxis Type: Symmetry/Antisymmetry/Encastre
*Boundary, op=NEW
Die1-1.Symmetry_Axis, XSYMM
** Name: Die2_DisplacementConstraint Type: Symmetry/Antisymmetry/Encastre
*Boundary, op=NEW
_PickedSet234, ENCASTRE
** Name: Die2_Machine_ContactTemperature Type: Temperature
*Boundary, op=NEW
Die2-1.Machine_Contact_Surfaces, 11, 11, 70.
** Name: Die2_SymmetryAxis Type: Symmetry/Antisymmetry/Encastre
*Boundary, op=NEW
Die2-1.Symmetry_Axis, XSYMM
** Name: Punch1_Machine_ContactTemperature Type: Temperature
*Boundary, op=NEW
Punch1-1.Machine_Contact_Surface, 11, 11, 70.
** Name: Punch1_RemovalVelocity Type: Velocity/Angular velocity
*Boundary, op=NEW
** Name: Punch1_SymmetryAxis Type: Symmetry/Antisymmetry/Encastre
*Boundary, op=NEW
Punch1-1.Symmetry_Axis, XSYMM
** Name: Punch2_Machine_ContactTemperature Type: Temperature
*Boundary, op=NEW
Punch2-1.Machine_Contact_Surface, 11, 11, 70.
** Name: Punch2_SymmetryAxis Type: Symmetry/Antisymmetry/Encastre
*Boundary, op=NEW
Punch2-1.Symmetry_Axis, XSYMM
** Name: Punch2_Velocity Type: Velocity/Angular velocity
*Boundary, op=NEW, amplitude=Punch2_Speed, type=VELOCITY
_PickedSet233, 1, 1
_PickedSet233, 2, 2, -1.
_PickedSet233, 6, 6
*Adaptive Mesh, elset=Billet-1.Body, controls=Ada-1, frequency=5, mesh sweeps=3, op=NEW
**
** INTERACTIONS
**
** Interaction: Die1_Billet_Contact
*Contact Pair, op=DELETE, cpset=Die1_Billet_Contact
Die1-1.Billet_Contact_Surfaces, Billet-1.Tools_Contact_Surface
** Interaction: Die2_Billet_Contact
*Contact Pair, interaction=Tools_Billet_Contact, mechanical constraint=KINEMATIC, cpset=Die2_Billet_Contact
Die2-1.Billet_Contact_Surfaces, Billet-1.Tools_Contact_Surface
** Interaction: Punch1_Billet_Contact
*Contact Pair, op=DELETE, cpset=Punch1_Billet_Contact
Punch1-1.Billet_Contact_Surface, Billet-1.Tools_Contact_Surface
** Interaction: Punch2_Billet_Contact
*Contact Pair, interaction=Tools_Billet_Contact, mechanical constraint=KINEMATIC, cpset=Punch2_Billet_Contact
Punch2-1.Billet_Contact_Surfaces, Billet-1.Tools_Contact_Surface
** Interaction: Interpause_Convection
*Sfilm, op=NEW
** Interaction: Interpause_Radiation
*Sradiate, op=NEW
**
** OUTPUT REQUESTS
**
*Restart, write, overlay, number interval=1, time marks=NO
**
** FIELD OUTPUT: F-Output-1
**
*Output, field, number interval=500
*Node Output
CF, NT, RF, RFL, U, V
*Element Output, directions=YES
E, ER, HFL, LE, MISES, S, SDV, TEMP
*Contact Output
CFORCE, CSTRESS
**
** FIELD OUTPUT: F-Output-2
**
*Output, field, filter=ANTIALIASING, number interval=500
*Node Output
CF, NT, RF, RFL, U, V
*Element Output, directions=YES
E, ER, HFL, LE, MISES, S, SDV, TEMP
*Contact Output
CFORCE, CSTRESS
**
** HISTORY OUTPUT: H-Output-1
**
*Output, history, time interval=0.004
*Energy Output
ALLAE, ALLCD, ALLCW, ALLDMD, ALLFD, ALLHF, ALLIE, ALLIHE, ALLKE, ALLMW, ALLPD, ALLPW, ALLSE, ALLVD, ALLWK, ETOTAL
**
** HISTORY OUTPUT: H-Output-3
**
*Output, history, filter=ANTIALIASING, time interval=0.004
*Contact Output, cpset=Punch2_Billet_Contact
CFN1, CFN2, CFN3, CFNM, CFS1, CFS2, CFS3, CFSM, CFT1, CFT2, CFT3, CFTM
*End Step
** ----------------------------------------------------------------
**
** STEP: AirCooling
**
*Step, name=AirCooling, nlgeom=YES
*Dynamic Temperature-displacement, Explicit
, 100.
*Bulk Viscosity
0.06, 1.2
** Mass Scaling: Semi-Automatic
**               Whole Model
*Fixed Mass Scaling, factor=1e+06
**
** BOUNDARY CONDITIONS
**
** Name: Billet2-DisplacementConstraint Type: Displacement/Rotation
*Boundary, op=NEW
Billet-1.Top_Surface, 2, 2
** Name: Billet_SymmetryAxis Type: Symmetry/Antisymmetry/Encastre
*Boundary, op=NEW
Billet-1.Symmetry_Axis, XSYMM
** Name: Die1_Machine_ContactTemperature Type: Temperature
*Boundary, op=NEW
Die1-1.Machine_Contact_Surfaces, 11, 11, 70.
** Name: Die1_SymmetryAxis Type: Symmetry/Antisymmetry/Encastre
*Boundary, op=NEW
Die1-1.Symmetry_Axis, XSYMM
** Name: Die2_DisplacementConstraint Type: Symmetry/Antisymmetry/Encastre
*Boundary, op=NEW
** Name: Die2_Machine_ContactTemperature Type: Temperature
*Boundary, op=NEW
Die2-1.Machine_Contact_Surfaces, 11, 11, 70.
** Name: Die2_RemovalVelocity Type: Velocity/Angular velocity
*Boundary, op=NEW, amplitude=Tools_RemovalSpeed, type=VELOCITY
_PickedSet239, 1, 1
_PickedSet239, 2, 2, -1.
_PickedSet239, 6, 6
** Name: Die2_SymmetryAxis Type: Symmetry/Antisymmetry/Encastre
*Boundary, op=NEW
Die2-1.Symmetry_Axis, XSYMM
** Name: Punch1_Machine_ContactTemperature Type: Temperature
*Boundary, op=NEW
Punch1-1.Machine_Contact_Surface, 11, 11, 70.
** Name: Punch1_SymmetryAxis Type: Symmetry/Antisymmetry/Encastre
*Boundary, op=NEW
Punch1-1.Symmetry_Axis, XSYMM
** Name: Punch2_Machine_ContactTemperature Type: Temperature
*Boundary, op=NEW
Punch2-1.Machine_Contact_Surface, 11, 11, 70.
** Name: Punch2_RemovalVelocity Type: Velocity/Angular velocity
*Boundary, op=NEW, amplitude=Tools_RemovalSpeed, type=VELOCITY
_PickedSet238, 1, 1
_PickedSet238, 2, 2, 1.
_PickedSet238, 6, 6
** Name: Punch2_SymmetryAxis Type: Symmetry/Antisymmetry/Encastre
*Boundary, op=NEW
Punch2-1.Symmetry_Axis, XSYMM
** Name: Punch2_Velocity Type: Velocity/Angular velocity
*Boundary, op=NEW
*Adaptive Mesh, elset=Billet-1.Body, op=NEW
**
** INTERACTIONS
**
** Interaction: Die2_Billet_Contact
*Contact Pair, op=DELETE, cpset=Die2_Billet_Contact
Die2-1.Billet_Contact_Surfaces, Billet-1.Tools_Contact_Surface
*Contact Pair, interaction=Tools_Billet_Frictionless_Contact, mechanical constraint=KINEMATIC, cpset=Die2_Billet_Contact
Die2-1.Billet_Contact_Surfaces, Billet-1.Tools_Contact_Surface
** Interaction: Punch2_Billet_Contact
*Contact Pair, op=DELETE, cpset=Punch2_Billet_Contact
Punch2-1.Billet_Contact_Surfaces, Billet-1.Tools_Contact_Surface
*Contact Pair, interaction=Tools_Billet_Frictionless_Contact, mechanical constraint=KINEMATIC, cpset=Punch2_Billet_Contact
Punch2-1.Billet_Contact_Surfaces, Billet-1.Tools_Contact_Surface
** Interaction: AirCooling_Convection_and_Radiation
*Sfilm
Billet-1.Surrounding_Surfaces, F, 20., 2.
**
** OUTPUT REQUESTS
**
*Restart, write, overlay, number interval=1, time marks=NO
**
** FIELD OUTPUT: F-Output-1
**
*Output, field, number interval=200
*Node Output
CF, NT, RF, RFL, U, V
*Element Output, directions=YES
E, ER, HFL, LE, MISES, S, SDV, TEMP
*Contact Output
CFORCE, CSTRESS
**
** FIELD OUTPUT: F-Output-2
**
*Output, field, filter=ANTIALIASING, number interval=200
*Node Output
CF, NT, RF, RFL, U, V
*Element Output, directions=YES
E, ER, HFL, LE, MISES, S, SDV, TEMP
*Contact Output
CFORCE, CSTRESS
**
** HISTORY OUTPUT: H-Output-1
**
*Output, history
*Energy Output
ALLAE, ALLCD, ALLCW, ALLDMD, ALLFD, ALLHF, ALLIE, ALLIHE, ALLKE, ALLMW, ALLPD, ALLPW, ALLSE, ALLVD, ALLWK, ETOTAL
*End Step
