*Heading
** Job name: Upsetting Model name: Upsetting
** Generated by: Abaqus/CAE 2017
*Preprint, echo=NO, model=NO, history=NO, contact=NO
**
** PARTS
**
*Part, name=Punch
*Node
      1,           3.,   10.3464909
      2,    2.8499999,   10.3464909
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*Element, type=CAX4RT
  1,   1,   2,  23,  22
  2,   2,   3,  24,  23
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*Nset, nset=Symmetry_Axis, generate
  21,  168,   21
*Elset, elset=Symmetry_Axis, generate
  20,  140,   20
*Nset, nset=Body, generate
   1,  168,    1
*Elset, elset=Body, generate
   1,  140,    1
*Nset, nset=Machine_Contact_Surface, generate
  1,  21,   1
*Elset, elset=Machine_Contact_Surface, generate
  1,  20,   1
*Elset, elset=_Specimen_Contact_Surface_S3, internal, generate
 121,  140,    1
*Surface, type=ELEMENT, name=Specimen_Contact_Surface
_Specimen_Contact_Surface_S3, S3
*Elset, elset=_Lateral_Surface_S4, internal, generate
   1,  121,   20
*Surface, type=ELEMENT, name=Lateral_Surface
_Lateral_Surface_S4, S4
** Section: Punch
*Solid Section, elset=Body, controls=EC-1, material=ToolSteel
,
*End Part
**
*Part, name=Specimen
*Node
      1,           0.,           5.
      2, 0.0972222239,           5.
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*Element, type=CAX4RT
  1,   1,   2,  21,  20
  2,   2,   3,  22,  21
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*Nset, nset=Symmetry_Axis, generate
   1,  476,   19
*Elset, elset=Symmetry_Axis, generate
   1,  433,   18
*Nset, nset=Symmetry_Plane, generate
  1,  19,   1
*Elset, elset=Symmetry_Plane, generate
  1,  18,   1
*Nset, nset=Body, generate
   1,  494,    1
*Elset, elset=Body, generate
   1,  450,    1
*Elset, elset=_Punch_Contact_Surface_S3, internal, generate
 433,  450,    1
*Surface, type=ELEMENT, name=Punch_Contact_Surface
_Punch_Contact_Surface_S3, S3
*Elset, elset=_Lateral_Surface_S2, internal, generate
  18,  450,   18
*Surface, type=ELEMENT, name=Lateral_Surface
_Lateral_Surface_S2, S2
** Section: Specimen
*Solid Section, elset=Body, controls=EC-1, material=MildSteel_20MnCr5_1
,
*End Part
**
**
** ASSEMBLY
**
*Assembly, name=Assembly
**
*Instance, name=Specimen, part=Specimen
          0.,          -5.,           0.
*End Instance
**
*Instance, name=Punch, part=Punch
          0., -6.84649085998535,           0.
*End Instance
**
*Node
      1,           0.,          3.5,           0.
*Nset, nset=_PickedSet110, internal
 1,
*Nset, nset=_PickedSet111, internal, instance=Punch, generate
   1,  168,    1
*Elset, elset=_PickedSet111, internal, instance=Punch, generate
   1,  140,    1
*Nset, nset=_PickedSet208, internal
 1,
*Nset, nset=_PickedSet209, internal, instance=Specimen, generate
   1,  494,    1
*Elset, elset=_PickedSet209, internal, instance=Specimen, generate
   1,  450,    1
*Nset, nset=_PickedSet210, internal, instance=Specimen, generate
   1,  494,    1
*Elset, elset=_PickedSet210, internal, instance=Specimen, generate
   1,  450,    1
*Nset, nset=_PickedSet213, internal
 1,
** Constraint: Punch_Rigidity
*Rigid Body, ref node=_PickedSet110, elset=_PickedSet111
*End Assembly
**
** ELEMENT CONTROLS
**
*Section Controls, name=EC-1, second order accuracy=YES
1., 1., 1.
*Amplitude, name=Punch_RemovalSpeed
             0.,              0.,             0.2,              1.,             0.4,              0.,             0.5,              0.
*Amplitude, name=Punch_Speed, definition=DECAY
             0.,             25.,              0.,             0.1
**
** MATERIALS
**
*Material, name=MildSteel_20MnCr5_1
*Conductivity
 42.7493, 20.
 42.8068, 30.
 42.9128, 40.
 43.0066, 50.
 43.0883, 60.
 43.1578, 70.
 43.2152, 80.
 43.2606, 90.
 43.2939,100.
 43.3153,110.
 43.3247,120.
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  34.617,600.
*Density
 7.81964e-09, 20.
 7.81817e-09, 30.
  7.8152e-09, 40.
 7.81222e-09, 50.
 7.80923e-09, 60.
 7.80622e-09, 70.
  7.8032e-09, 80.
 7.80017e-09, 90.
 7.79712e-09,100.
 7.79405e-09,110.
 7.79097e-09,120.
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 7.62689e-09,600.
*Depvar
      5,
*Expansion, zero=20.
 1.25868e-05, 30.
 1.26229e-05, 40.
 1.26589e-05, 50.
 1.26949e-05, 60.
  1.2731e-05, 70.
  1.2767e-05, 80.
 1.28031e-05, 90.
 1.28391e-05,100.
 1.28752e-05,110.
 1.29113e-05,120.
 1.29473e-05,130.
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 1.46506e-05,600.
*Inelastic Heat Fraction
          1.,
*Specific Heat
 4.4758e+08, 20.
 4.4982e+08, 30.
  4.542e+08, 40.
 4.5846e+08, 50.
 4.6263e+08, 60.
 4.6672e+08, 70.
 4.7075e+08, 80.
 4.7474e+08, 90.
  4.787e+08,100.
 4.8264e+08,110.
 4.8657e+08,120.
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 8.1387e+08,600.
*User Material, constants=1
1.,
*Material, name=ToolSteel
*Conductivity
 46.6,
*Density
 7.81e-09,
*Elastic
210000., 0.3
*Specific Heat
 4.75e+08,
**
** INTERACTION PROPERTIES
**
*Surface Interaction, name=Punch_Specimen_Contact
*Friction
 0.05,
*Gap Conductance, pressure
 0.,   0.
15.,  50.
40.,1000.
**
** PHYSICAL CONSTANTS
**
*Physical Constants, absolute zero=-273.15, stefan boltzmann=5.6704e-11, universal gas=8314.47
**
** PREDEFINED FIELDS
**
** Name: Punch_Initial_Temperature   Type: Temperature
*Initial Conditions, type=TEMPERATURE
Punch.Body, 20.
** Name: Specimen_Initial_Temperature   Type: Temperature
*Initial Conditions, type=TEMPERATURE
Specimen.Body, 20.
** ----------------------------------------------------------------
**
** STEP: Deformation
**
*Step, name=Deformation, nlgeom=YES
*Dynamic Temperature-displacement, Explicit
, 0.075
*Bulk Viscosity
0.06, 1.2
** Mass Scaling: Semi-Automatic
**               Whole Model
*Fixed Mass Scaling, factor=1000.
**
** BOUNDARY CONDITIONS
**
** Name: Punch_Machine_ContactTemperature Type: Temperature
*Boundary
Punch.Machine_Contact_Surface, 11, 11, 20.
** Name: Punch_Symmetry_Axis Type: Symmetry/Antisymmetry/Encastre
*Boundary
Punch.Symmetry_Axis, XSYMM
** Name: Punch_Velocity Type: Velocity/Angular velocity
*Boundary, amplitude=Punch_Speed, type=VELOCITY
_PickedSet208, 1, 1
_PickedSet208, 2, 2, -1.
_PickedSet208, 6, 6
** Name: Specimen_Symmetry_Axis Type: Symmetry/Antisymmetry/Encastre
*Boundary
Specimen.Symmetry_Axis, XSYMM
** Name: Specimen_Symmetry_Plane Type: Symmetry/Antisymmetry/Encastre
*Boundary
Specimen.Symmetry_Plane, YSYMM
*Adaptive Mesh Controls, name=Ada-1, geometric enhancement=YES
1., 0., 0.
**
** INTERACTIONS
**
** Interaction: Punch_Specimen_Contact
*Contact Pair, interaction=Punch_Specimen_Contact, mechanical constraint=KINEMATIC, cpset=Punch_Specimen_Contact
Punch.Specimen_Contact_Surface, Specimen.Punch_Contact_Surface
** Interaction: Convection
*Sfilm
Specimen.Lateral_Surface, F, 20., 0.015
** Interaction: Radiation
*Sradiate
Specimen.Lateral_Surface, R, 20., 0.8
**
** OUTPUT REQUESTS
**
*Restart, write, number interval=1, time marks=NO
**
** FIELD OUTPUT: F-Output-1
**
*Output, field, number interval=300
*Node Output
CF, NT, RF, RFL, U, V
*Element Output, directions=YES
E, ER, HFL, LE, MISES, S, SDV, TEMP
**
** FIELD OUTPUT: F-Output-2
**
*Output, field, filter=ANTIALIASING, number interval=300
*Node Output
CF, NT, RF, RFL, U, V
*Element Output, directions=YES
E, ER, HFL, LE, MISES, S, SDV, TEMP
**
** HISTORY OUTPUT: H-Output-1
**
*Output, history, time interval=0.00025
*Energy Output
ALLAE, ALLCD, ALLCW, ALLDMD, ALLFD, ALLHF, ALLIE, ALLIHE, ALLKE, ALLMW, ALLPD, ALLPW, ALLSE, ALLVD, ALLWK, ETOTAL
**
** HISTORY OUTPUT: H-Output-2
**
*Contact Output, cpset=Punch_Specimen_Contact
CFN1, CFN2, CFN3, CFNM, CFS1, CFS2, CFS3, CFSM, CFT1, CFT2, CFT3, CFTM
*End Step
